4! = 24
124
addad
ln(25) = 3.21888
x := 1, 1.5 .. 5
y := 1, 2 .. 10
z(x, y) := (5*x^2 - y + 1)/sqrt((x + y)^2)
x = [1; 1.5; 2; 2.5; 3; 3.5; 4; 4.5; 5]
y = [1; 2; 3; 4; 5; 6; 7; 8; 9; 10]
z(x, y) = [
    2.5; 1.33333; 0.75; 0.4; 0.166667; 0; -0.125; -0.222222; -0.3; -0.363636
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]
x := 0, 0.01 .. 5
y(x) := (5*x^2 - x + 1)/sin(x)
# [plot: y(x) vs x]
x := 0, 0.05 .. 2*π
y(x) := sin(3*x)
z(x) := cos(5*x)
# [polar plot: y(x), z(x)]
i := 0 .. 100
j := 0 .. 100
x[i] := i
y[j] := j
z(x, y) := (sin(3*x) + cos(y/4))*y
M[i, j] := z(x[i], y[j])
# [3D plot: M]
[1, 2, 4, 6; 3, 5, 5, 1; 1, 9, 6, 4]*[2, 4, 1; 6, 3, 5; 5, 1, 3; 4, 5, 5] = [58, 44, 53; 65, 37, 48; 102, 57, 84]
det([4, 6, 5, 4, 7; 1, 1, 2, 5, 1; 4, 6, 8, 0, 7; 1, 6, 4, 1, 5; 3, 4, 5, 9, 0]) = 1258
[4, 6, 5, 4, 7; 1, 1, 2, 5, 1; 4, 6, 8, 0, 7; 1, 6, 4, 1, 5; 3, 4, 5, 9, 0]^-1 = [
    0.358506, -0.534181, -0.0158983, -0.372814, 0.178855;
    0.0699523, -0.421304, -0.149444, 0.195548, 0.18124;
    -0.306836, 0.279809, 0.246423, 0.0286169, -0.0222576;
    0.0198728, 0.209857, -0.0651828, 0.0214626, -0.0166932;
    0.0858506, 0.346582, -0.00158983, 0.0127186, -0.232114
]
max([8, 7, 4, 1, 7; 1, 11, 2, 5, 1; 4, 6, 13, 0, 7; 2, 6, 9, 1, 5; 3, 2, 5, 1, 0]) = 13
[8, 7, 4, 1, 7; 1, 11, 2, 5, 1; 4, 6, 13, 0, 7; 2, 6, 9, 1, 5; 3, 2, 5, 1, 0]
min([8, 7, 4, 1, 7; 1, 11, 2, 5, 1; 4, 6, 13, 0, 7; 2, 6, 9, 1, 5; 3, 2, 5, 1, 0]) = 0
rows([
    3, 4, 3, 6, 3, 4, 5;
    1, 5, 0, 2, 3, 5, 2;
    5, 3, 6, 5, 6, 2, 5;
    7, 2, 1, 8, 1, 6, 6;
    1, 2, 3, 4, 5, 8, 5
]) = 5
[
    3, 4, 3, 6, 3, 4, 5;
    1, 5, 0, 2, 3, 5, 2;
    5, 3, 6, 5, 6, 2, 5;
    7, 2, 1, 8, 1, 6, 6;
    1, 2, 3, 4, 5, 8, 5
]
cols([
    3, 4, 3, 6, 3, 4, 5;
    1, 5, 0, 2, 3, 5, 2;
    5, 3, 6, 5, 6, 2, 5;
    7, 2, 1, 8, 1, 6, 6;
    1, 2, 3, 4, 5, 8, 5
]) = 7
x := [3; 5; 3]
y := [8; 3; 5]
# [plot: y vs x]
x := [4, 9, 3; 5, 4, 5; 3, 4, 3]
z(x) := x*[1; 3; 5]
L := z(x)
# [3D plot: L]
