solve block
    # guess values
    x := 1
    y := 1
    z := 1
    v := 1
    w := 1
    # constraints
    5.6*x + 7.2*y + 9.8*z + 3.9*v + 3.4*w == 43
    65.75*x + 54.32*y - 78.32*z - 565.9*v + 32*w == 12.54
    5.6*x + 98.5*y + 43.7*z + 67.85*v + 4.9*w == 54.98
    4.5*x + 7.9*y - 2.1*v + 6.75*w == 55.5
    54.2*x + 76.45*y + 32.23*z + 45.71*v + 43.43*w == 65.21
    # solver
    otvet := find(x, y, z, v, w)
    otvet = [-15.6697; -1.92881; 8.54262; -2.06319; 20.2842]
end solve block
